# OpenSim document version 20302
# Six whole-body residual actuators for normal.mot, copied in form from the
# project's gait2392_RRA_Actuators.xml. They expose the support wrench that
# is missing because normal.mot has no matching GRF/COP measurements.
# No joint reserve actuators are included: limb/trunk torques remain the
# responsibility of the muscle set.
ForceSet normal_pelvis_residuals:
  PointActuator normal_residual_FX: body=pelvis point=(-0.0724376 0 0) point_is_global=false direction=(1 0 0)
      force_is_global=true optimal_force=4
  PointActuator normal_residual_FY: body=pelvis point=(-0.0724376 0 0) point_is_global=false direction=(0 1 0)
      force_is_global=true optimal_force=8
  PointActuator normal_residual_FZ: body=pelvis point=(-0.0724376 0 0) point_is_global=false direction=(0 0 1)
      force_is_global=true optimal_force=4
  TorqueActuator normal_residual_MX: bodyA=pelvis bodyB=ground torque_is_global=true axis=(1 0 0) optimal_force=2
  TorqueActuator normal_residual_MY: bodyA=pelvis bodyB=ground torque_is_global=true axis=(0 1 0) optimal_force=2
  TorqueActuator normal_residual_MZ: bodyA=pelvis bodyB=ground torque_is_global=true axis=(0 0 1) optimal_force=2
