# OpenSim document version 40500
# Static-optimization backsolve for Tutorial1/normal.mot.
# IMPORTANT: normal.mot contains prescribed coordinates only. No matching
# GRF/COP file exists in Tutorial1, so this setup deliberately applies no
# external loads. Results are therefore a kinematics-only muscle solution,
# not a dynamically consistent loaded-walking estimate. Residual/infeasible
# frames must be reported rather than hidden.
AnalyzeTool normal_backsolve:
  model_file: gait2392_simbody_normal_so.osim
  replace_force_set: false
  force_set_files: normal_pelvis_residuals.xml
  results_directory: ./ResultsNormalSO
  output_precision: 10
  initial_time: 0
  final_time: 1
  solve_for_equilibrium_for_auxiliary_states: false
  maximum_number_of_integrator_steps: 20000
  maximum_integrator_step_size: 1
  minimum_integrator_step_size: 1e-8
  integrator_error_tolerance: 1e-10
  coordinates_file: Tutorial1/normal.mot
  lowpass_cutoff_frequency_for_coordinates: 6
  AnalysisSet Analyses:
    StaticOptimization: start_time=0 end_time=1 step_interval=1 in_degrees=true use_model_force_dof_velocity=false
        activation_exponent=2 use_muscle_physiology=false
