# OpenSim document version 20302
AnalyzeTool zz_bsolve:
  model_file: subject01_simbody.osim
  replace_force_set: false
  results_directory: ./ResultsBSolve
  output_precision: 8
  initial_time: 0.5
  final_time: 2.5
  solve_for_equilibrium_for_auxiliary_states: false
  maximum_number_of_integrator_steps: 20000
  maximum_integrator_step_size: 1
  minimum_integrator_step_size: 1e-8
  integrator_error_tolerance: 1e-10
  external_loads_file: subject01_walk1_grf.xml
  coordinates_file: subject01_walk1_ik.mot
  lowpass_cutoff_frequency_for_coordinates: 6
  AnalysisSet Analyses:
    MuscleAnalysis: start_time=-infinity end_time=infinity step_interval=1 in_degrees=true muscle_list=all
        moment_arm_coordinate_list=all compute_moments=true
    StaticOptimization: start_time=-infinity end_time=infinity step_interval=1 in_degrees=true
        use_model_force_dof_velocity=false
